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(1j*30 Ω + 10 Ω)*I_A + (20 Ω + 1j*10 Ω)*(I_A - I_B) + 120 V simplify → 120*V + (-20 - 10i)*Ω*I_B + (30 + 40i)*Ω*I_A
-120 V + (20 Ω + 1j*10 Ω)*(I_B - I_A) + (30 Ω + 1j*20 Ω)*I_B simplify → -(120*V) + (50 + 30i)*Ω*I_B + (-20 - 10i)*Ω*I_A
I_A1 := 120 + (-20 - 10i)*I_B + (30 + 40i)*I_A == 0 solve, I_A → I_B*(2/5 - 1/5*1i) - 36/25 + 48/25*1i
I_B := -120 + (50 + 30i)*I_B + (-20 - 10i)*I_A1 solve, I_B → 36/25 - 12/25*1i
I_A := 120 + (-20 - 10i)*I_B + (30 + 40i)*I_A == 0 solve, I_A → -24/25 + 36/25*1i
I_A = -0.96 + 1.44i
I_A = -0.96 + 1.44i
I_B = 1.44 - 0.48i
I_B = 1.44 - 0.48i
