# i)
(s + 2)/(s^2 + 6*s + 2)  # <---- Her findes poler ved at solve nævneren for s
s^2 + 6*s + 2 == 0 solve, s → [sqrt(7) - 3; -sqrt(7) - 3] = [-0.354249; -5.64575]
s + 2 solve, s → -2  # <---- Her findes nulpunktet ved at solve tælleren for s
re*[s] > -0.354
# ii)
(s^2 - 10*s - 171)/(s^4 - 30*s^3*260*s^2 - 1010*s + 779)
# <---- Her findes poler ved at solve nævneren for s. 19 eksistere ikke
s^4 - 30*s^3 + 260*s^2 - 1010*s + 779 solve, s → [1; 19; 5 + 4i; 5 - 4i]
re*[s] > 5
s^2 - 10*s - 171 solve, s → [-9; 19]  # <---- Her findes nulpunktet ved at solve tælleren for s. 19 eksistere ikke.
# iii)
s^2 - 3*s + 2 solve, s → [1; 2]
s == 0
Re*[s] == 2
s/(s^2 - 3*s + 2)
# iv)
4/(s^2 - 4*s + 8)
s^2 - 4*s + 8 solve, s → [2 + 2i; 2 - 2i]  # Der er ingen nulpunkter
# v)
(s + 2)/(s^3 + 6*s^2 - 11*s + 40) + 8/s factor → (8*s^3 + 49*s^2 - 86*s + 320)/(s*(s + 8)*(s^2 - 2*s + 5))
s*(s + 8)*(s^2 - 2*s + 5) solve, s → [0; -8; 1 + 2i; 1 - 2i]
A := 8*s^3 + 49*s^2 - 86*s + 320  # error: These units are not compatible.
A := 8*s^3 + 49*s^2 - 86*s + 320 solve, s → [
    -(49*(545833/13824 - sqrt(40300621)/192)^(1/3)/24 + (506852083153/191102976 - 545833*sqrt(40300621)/1327104)^(1/3) + 4465/576)/(545833/13824 - sqrt(40300621)/192)^(1/3);
    (576*(506852083153/191102976 - 545833*sqrt(40300621)/1327104)^(1/3) - 2352*(545833/13824 - sqrt(40300621)/192)^(1/3) + 4465 - 4465i*sqrt(3) + 576i*sqrt(3)*(506852083153/191102976 - 545833*sqrt(40300621)/1327104)^(1/3))/(1152*(545833/13824 - sqrt(40300621)/192)^(1/3));
    (576*(506852083153/191102976 - 545833*sqrt(40300621)/1327104)^(1/3) - 2352*(545833/13824 - sqrt(40300621)/192)^(1/3) + 4465 - 576i*sqrt(3)*(506852083153/191102976 - 545833*sqrt(40300621)/1327104)^(1/3) + 4465i*sqrt(3))/(1152*(545833/13824 - sqrt(40300621)/192)^(1/3))
] = [-8.07099; 0.972993 - 2.00233i; 0.972993 + 2.00233i]
A = [-8.07099; 0.972993 - 2.00233i; 0.972993 + 2.00233i]
# vi)
(s + 2)/(s^2 + 6*s + 2) + s/(s^2 - 3*s + 4)
