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Z_R1 := 25 Ω
Z_R2 := 20 Ω
Z_L := 1j*50 Ω
Z_C1 := -1j*100 Ω
Z_C2 := -1j*25 Ω
ω := 10000
Z_erstat := (1/(Z_R2 + Z_L) + 1/Z_C1)^-1 + Z_R1 + Z_C2 = (93.9655 + 47.4138i) Ω
Z_erstat = (93.9655 + 47.4138i) Ω
# Kigger man på resultatet fra Zerstat, er modstanden givet ved Real delen, og om det er en spole eller kondensator, der ellers er givet vurderes ved imaginær delen.
# Da Imaginær delen er positiv, er der tale om en spole, havde der været tale om en kordensator.
#
# Det kan regnes ud
R_total := 94 Ω
Z_L1 := 47.41i
Z_L1 == 1j*ω*L solve, L → 0.004741
