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V_T(s) == V_OC(s)
Z_R1 := R
Z_Ls := L*s
Z_RL := Z_R1*Z_Ls/(Z_R1 + Z_Ls)
Z_RL → L*R*s/(R + L*s)
# Ved brugen af spændingsdeler formlen, kan Voc findes
# Spændingsdeler:
V_out == Z_2/(Z_1 + Z_2)*V_in
V_oc(s) := Z_RL/(Z_R1 + Z_RL)*V_s(s)
V_oc(s) simplify → L*s*V_s(s)/(R + 2*L*s)
V_T(s) := V_oc(s)
# svar:
V_T(s) simplify → L*s*V_s(s)/(R + 2*L*s)
# For at finde ZT så skal vi kortslutte udgangen, dvs at spolen og modstanden der er parallele for hinanden er ligegyldige.
Z_T(s) == V_T(s)/I_sc(s)
I_sc(s) := V_s(s)/Z_R1
Z_T(s) := V_T(s)/I_sc(s)
# svar:
Z_T(s) simplify → L*R*s/(R + 2*L*s)
