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# Hvis vi ændre vores kredsløb, således at spolen har en spændingskilde i serie med spolen. Så kan man let beregne IL(s), da strømmen bergnes med spænding divideret med den samlet impedans.
I_L(s) == V(s)/Z
Li_L := L*V_A/R  # error: This variable is undefined. Check that the label is set correctly.
Z := 2*R + L*s  # error: {0} has multiple definitions, you must specify the label to select the definition that you want.
I_L(s) := Li_L/Z  # error: This variable is undefined. Check that the label is set correctly.
# svar:
I_L(s) → L*V_A/(R*(2*R + L*s))
# svar:
I_L(s) invlaplace → V_A*e^(-2*R*t/L)/R
# svar:
V_o(s) := -I_L(s)*R simplify → -L*V_A/(2*R + L*s)
# Svar:
V_o(s) invlaplace → -(V_A*e^(-2*R*t/L))
