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# Den transformede kredsløb
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V_c := V_A  # error: This variable is undefined. Check that the label is set correctly.
# svar:
I_L(s) := -V_c/s/(R_3 + R_2 + s*L + 1/(s*C)) simplify → -C*V_A/(C*s*R_2 + C*s*R_3 + C*L*s^2 + 1)
R_2 := 500 Ω
R_3 := 1000 Ω
L := 500 mH
C := 0.2 μF
V_A := 15 V
# svar:
-C*V_A/(C*s*R_2 + C*s*R_3 + C*L*s^2 + 1) → -3.0*V*μF/(300.0*s*Ω*μF + 100.0*s^2*mH*μF + 1)
