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Z_C := 1/(C*s)
Z_R := 2*R  # error: {0} has multiple definitions, you must specify the label to select the definition that you want.
# Serie:
Z_eq1 := Z_C + Z_R → 2*R + 1/(C*s)
# Parrallel:
Z_total := (1/Z_eq1 + 1/Z_R)^-1 factor → 2*R*(2*C*R*s + 1)/(4*C*R*s + 1)
2*R*(2*C*R*s + 1) expand → 4*C*s*R^2 + 2*R
2*R*(2*C*R*s + 1)/(4*C*R*s + 1) == (4*C*s*R^2 + 2*R)/(4*C*R*s + 1) == (R*s + 1/(2*C))/(s + 1/(4*C*R)) == R*(s + 1/(2*R*C))/(s + 1/(4*C*R))
C := 100*10^-9
R := 1/(4*C*640) = 3906.25
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G := R*(s + 1/(2*R*C))/(s + 1/(4*C*R))  # error: These units are not compatible.
3906*(s + 1280)/(s + 640) == (3906*s + 4999680)/(s + 640)
