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T_V(s) == T_V1(s)*T_V2(s)
C := 0.15*10^-6
R_1 := 20000
R_2 := 30000
R_3 := 10000
T_V2(s) == 1 + R_2/(R_3 + R_2) == (R_3 + R_2)/(R_3 + R_2) + R_2/(R_3 + R_2) == (R_3 + 2*R_2)/(R_3 + R_2)
T_V1(s) == 1/(C*s)/(R_1 + 1/(C*s)) == 1/(C*R_1*s + 1) == 1/(C*R_1)/(s + 1/(C*R_1))
Gain := (30000 + 10000)/10000 = 4
T_V(s) == 1/(C*R_1)/(s + 1/(C*R_1))*(1 + R_2/R_3) → T_V(s) == 1333.33333333/(s + 333.333333333)
ω_c == 1/α == 1/(R_1*C) == 1/(20000*0.15*10^-6) == 333.333
Infinite_frequency := limit(1/(C*R_1)/(s + 1/(C*R_1))*(1 + R_2/R_3), s → ∞) → 0.0
