# Opgave B.1
s := ω*j  # error: This variable is undefined. Check that the label is set correctly.
TF := s/(s + 2)  # error: This variable is undefined. Check that the label is set correctly.
A < ϕ
j^2 == -1
-j == 1/j
TF → j*ω/(j*ω + 2)
# Amplituden:
A == j*ω/|j*ω + 2| == j*ω/sqrt(j^2*ω^2 + 2^2) == -ω/sqrt(ω^2 + 2^2) == |-ω|/sqrt(ω^2 + 2^2) == |ω|/sqrt(ω^2 + 4)
# Vinklen:
ϕ == tan^-1*(b/a)
a == 2
b == ω
ϕ == tan^-1*(2/ω)
# Samlet udtryk:
|ω|/sqrt(ω^2 + 4) < tan^-1*(2/ω)
# B.2)
1/(s + 10) → 1/(j*ω + 10)
# Amplituden:
A == 1/|j*ω + 10| == 1/sqrt(j^2*ω^2 + 10^2) == |-1|/sqrt(ω^2 + 100) == 1/sqrt(ω^2 + 100)
# Vinklen:
ω == tan^-1*(b/a)
ω == tan^-1*(100/ω)
