# Opgave C
# Plot amplityden og fasen for funktionen i opgave B. ved s == jω. Brug evt dobbeltlogaritmiskpapir, logaritmis papir(henad x-aksen), mathcad eller bode-funktionen i matlab.
# A)
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s/(s + 2) == j*ω/(j*ω + 2)
# B)
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1/(s + 10) == 1/(jω + 10)
