# Opgave D
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# a)
limit(|ω|/sqrt(ω^2 + 4), ω → ∞)
# Går ω mod uendeligt, så blivertæller og nævner så stor, at den vil betegnes som 1 uanset hvad der ellers er i udtrykket.
# b)
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ω := 0
1/sqrt(ω^2 + 100) → 1/10
K == 10
