# Opgave A
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# Step funktion:
3/2*t*(u(t) - u(t - 2))
3/2*t*(u(t) - u(t - 2)) == 3/2*t*u(t) - 3/2*tu(t - 2) == 3/2*t*u(t) - 3/2*(t - 2)*u(t - 2)
3/2*t*u(t) - 3/2*(t - 2 + 2)*u(t - 2) == 3/2*tu(t) - 3/2*(t - 2 + 2)*u(t - 2)
3/2*1/s^2 - 3/2*2/s^2*e^(-2*s)/s == 3/(2*s^2) - 3/2*e^(-2*s)*(1/s - 2/s^2)
# svar:
F(s) == 1/(1 - e^(-2*s))*(3/(2*s^2) - 3/2*e^(-2*s)*(1/s - 2/s^2))
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# ii)
u := Φ
