# Opgave A
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# i)Find periodetiden T i sec og opskriv funktionsforeskriften for f(t)
T == 1/f
ω == 2*π/T
T := π/2
# ii) Hvad er grundfrekvensen i rad/sec.
ω := 2*π/T = 4
f(t) == cos(ωt)
2*π/T == ω solve, T →  # error: No solution was found.
# iii) Opskriv formlen for Fourierrækken for f(t), hvor a0, an og bn er ukendte.
f(t) == a_0/2 + sum(a_ncos(2*nπt/T) + b_nsin(2*nπt/T), n = 1 .. ∞)
# iv)  Opskriv integralet for a0, og beregn den. Passer det med det forventede DC-offset?
a_0 == 2/T*integral(f(t), t = 0 .. T)
integral(cos(π/2*t), t = -1 .. 1) → 4/π
# vi)
a_n == 2/T*integral(f(t)*cos(2*nπt/T), t = -1 .. 1) == 2/2*integral(cos(π/2*t)*cos(2*nπt/2), t = -1 .. 1)
a_n == integral(cos(π/2*t)*cos(n*π*t), t = -1 .. 1) → a_n == -4*cos(π*n)/(π*(4*n^2 - 1))
-4*cos(π*n)/(π*(4*n^2 - 1)) expand → -4*cos(π*n)/(4*π*n^2 - π)
-4*cos(π*n)/(4*π*n^2 - π) == (-1)^n*(-4/(4*π*n^2 - π)) == (-1)^n*(-4/(-4)/(4*π*n^2/(-4) - π/(-4))) == (-1)^n*(1/(π/4 - π*n^2))
# vii) Opskriv integralet for bn, og beregn.
b_n == integral(cos(π/2*t)*sin(n*π*t), t = -1 .. 1) → b_n == 0
# vii) Opskriv hele Fourierrkken.
# Fourierrækken:
f(t) == a_0/2 + sum(a_ncos(2*nπt/T) + b_nsin(2*nπt/T), n = 1 .. ∞)
f(t) == 4/π/2 + sum((-1)^n*(1/(π/4 - πn^2))*cos(nπt) + 0*sin(nπt), n = 1 .. ∞)
f(t) == 2/π - (1/(π/4 - π))*cos(π*t) + (1/(π/4 - π2^2))*cos(2*π*t) + (1/(π/4 - π3^2))*cos(3*π*t)
