t
# RL Kredsløb
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T_v(s) == R/(L*s + R) == R/L/(s + R/L)
T_v(1j*ω) == R/L/(1j*ω + R/L)
T_v(1j*ω) == R/L/(1j*ω + R/L)
|T_v(1j*ω)| == R/L/sqrt(ω^2 + (R/L)^2)
R := 10
L := 0.001
ω := 12000
T_v := R/L/sqrt(ω^2 + (R/L)^2) = 0.640184
X := T_v*8 = 5.12148
