# Zeq I et serie kredsløb
C(s) == G(s)*R(s)
G(s) == C(s)/R(s)
R(s) == R + L*s + 1/(C + s)
C(s) == 1/(C*s)
R := 1
C := 1
L := 1
G(s) := 1/(C*s)/(R + L*s + 1/(C*s)) collect, s → 1/(s^2 + s + 1)
C(s) := 1/(C*s)
C(s)/G(s) → (s^2 + s + 1)/s
