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# Opgave2.2a
P(s) := 1/s
G(s) := K*ω_n^2/(s^2 + 2*ζω_n^2*s + ω_n^2)  # error: This variable is undefined. Check that the label is set correctly.
V(s) := P(s)*G(s)  # error: This variable is undefined. Check that the label is set correctly.
V(s) → K*ω_n^2/(s*(s^2 + 2*s*ζω_n^2 + ω_n^2))
v(s) := V(s) invlaplace, simplify → K - K*e^(-(t*ζω_n^2))*cosh(t*sqrt(ζω_n^4 - ω_n^2)) - K*ζω_n^2*e^(-(t*ζω_n^2))*sinh(t*sqrt(ζω_n^4 - ω_n^2))/sqrt(ζω_n^4 - ω_n^2)
# b)
# Transient del indeholder t
pt := -K*e^(-(t*ζω_n^2))*cosh(t*sqrt(ζω_n^4 - ω_n^2)) - K*ζω_n^2*e^(-(t*ζω_n^2))*sinh(t*sqrt(ζω_n^4 - ω_n^2))/sqrt(ζω_n^4 - ω_n^2)  # error: This variable is undefined. Check that the label is set correctly.
# Stationær del indeholder ikke t
K
# C)
# D)
t := π/(ω_n*sqrt(1 - ζ^2))  # error: This variable is undefined. Check that the label is set correctly.
et := -K*e^(-(t*ζω_n^2))*cosh(t*sqrt(ζω_n^4 - ω_n^2)) - K*ζω_n^2*e^(-(t*ζω_n^2))*sinh(t*sqrt(ζω_n^4 - ω_n^2))/sqrt(ζω_n^4 - ω_n^2)  # error: This variable is undefined. Check that the label is set correctly.
et simplify → -K*e^(-π*ζω_n^2/(ω_n*sqrt(1 - ζ^2)))*(cosh(π*sqrt(ζω_n^4 - ω_n^2)/(ω_n*sqrt(1 - ζ^2)))*sqrt(ζω_n^4 - ω_n^2) + ζω_n^2*sinh(π*sqrt(ζω_n^4 - ω_n^2)/(ω_n*sqrt(1 - ζ^2))))/sqrt(ζω_n^4 - ω_n^2)
